*Heading
** Job name: Job-1 Model name: Model-1
** Generated by: Abaqus/CAE 2023
*Preprint, echo=NO, model=NO, history=NO, contact=NO
**
** PARTS
**
*Part, name=Part-2
*End Part
**
**
** ASSEMBLY
**
*Assembly, name=Assembly
**
*Instance, name=Part-2-1, part=Part-2
*Node
      1,   1.44142103, -0.141421005,           0.
      2,   1.15857899,  0.141421005,           0.
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*Element, type=C3D8R
  1,   37,  499,  497,   38,  766, 1191, 1189,  765
  2,  499,  113,  112,  497, 1191,  632,  633, 1189
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*Nset, nset=Set-1, generate
    1,  1416,     1
*Elset, elset=Set-1, generate
   1,  696,    1
** Section: Section-1
*Solid Section, elset=Set-1, material=M300
,
*End Instance
**
*Node
      1,           0.,           0.,           0.
*Nset, nset=Set-3, instance=Part-2-1
   1,   2,   6,   7,   9,  10
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*Elset, elset=Set-3, instance=Part-2-1
  41,  42, 157, 158, 273, 274, 389, 390, 505, 506, 621, 622
*Nset, nset=Set-5
 1,
*Nset, nset=Set-6, instance=Part-2-1
   1,   2,   6,   7,   9,  10
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*Elset, elset=Set-6, instance=Part-2-1
  41,  42, 157, 158, 273, 274, 389, 390, 505, 506, 621, 622
*Nset, nset=Set-8, instance=Part-2-1
   1,   2,   6,   7,   9,  10
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*Elset, elset=Set-8, instance=Part-2-1
  41,  42, 157, 158, 273, 274, 389, 390, 505, 506, 621, 622
*Nset, nset=m_Set-1
 1,
*Nset, nset=m_Set-9
 1,
*Nset, nset=s_Set-1, instance=Part-2-1
   3,   4,   5,   8,  11,  12
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*Elset, elset=s_Set-1, instance=Part-2-1
 115, 116, 231, 232, 347, 348, 463, 464, 579, 580, 695, 696
*Nset, nset=s_Set-7, instance=Part-2-1
   3,   4,   5,   8,  11,  12
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*Elset, elset=s_Set-7, instance=Part-2-1
 115, 116, 231, 232, 347, 348, 463, 464, 579, 580, 695, 696
*Nset, nset=s_Set-9, instance=Part-2-1
   3,   4,   5,   8,  11,  12
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*Elset, elset=s_Set-9, instance=Part-2-1
 115, 116, 231, 232, 347, 348, 463, 464, 579, 580, 695, 696
*Surface, type=NODE, name=s_Set-9_CNS_, internal
s_Set-9, 1.
** Constraint: Constraint-1
*MPC
TIE, s_Set-9, m_Set-9
*End Assembly
**
** MATERIALS
**
*Material, name=M300
*Elastic
 2.75e+07, 0.33
**
** BOUNDARY CONDITIONS
**
** Name: BC-1 Type: Displacement/Rotation
*Boundary
Set-8, 1, 1
Set-8, 2, 2
Set-8, 3, 3
Set-8, 4, 4
Set-8, 5, 5
Set-8, 6, 6
** ----------------------------------------------------------------
**
** STEP: Step-1
**
*Step, name=Step-1, nlgeom=NO
*Static
0.1, 1., 1e-05, 1.
**
** LOADS
**
** Name: Load-1   Type: Moment
*Cload
Set-5, 6, 4550.
**
** OUTPUT REQUESTS
**
*Restart, write, frequency=0
**
** FIELD OUTPUT: F-Output-1
**
*Output, field, variable=PRESELECT
**
** HISTORY OUTPUT: H-Output-1
**
*Output, history, variable=PRESELECT
*End Step
