*Heading
** Job name: Job-1 Model name: Model-1
** Generated by: Abaqus/CAE 2023
*Preprint, echo=NO, model=NO, history=NO, contact=NO
**
** PARTS
**
*Part, name=Cut-1
*End Part
**
*Part, name=Part-1-Rigid-Inner
*End Part
**
*Part, name=Part-1-Rigid-Outer
*End Part
**
**
** ASSEMBLY
**
*Assembly, name=Assembly
**
*Instance, name=Cut-1-1, part=Cut-1
*Node
      1,  -2.44096971,        -0.25,           0.
      2,  -2.43906927, -0.115137823,           0.
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*Element, type=C3D8R
   1,  238,  258,   18,    1, 1641, 1661, 1421, 1404
   2,  258,  259,   19,   18, 1661, 1662, 1422, 1421
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*Nset, nset=Set-1, generate
    1,  5612,     1
*Elset, elset=Set-1, generate
    1,  3846,     1
** Section: Section-1
*Solid Section, elset=Set-1, material=Maraging300Steel
,
*End Instance
**
*Instance, name=Part-1-Rigid-Outer-1, part=Part-1-Rigid-Outer
*Node
      1,    -2.482342, -0.296610177,        0.375
      2,    -2.482342, -0.296610177,           0.
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*Element, type=R3D4
1,   1,  11, 323,  15
2,  11,   2,  12, 323
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*Node
    481,           0., 1.60734891e-16,           0.
*Nset, nset=Part-1-Rigid-Outer-1-RefPt_, internal
481,
*Elset, elset=Part-1-Rigid-Outer-1, generate
   1,  480,    1
*End Instance
**
*Instance, name=Part-1-Rigid-Inner-1, part=Part-1-Rigid-Inner
*Node
      1, -0.960000038, -0.279999942,        0.375
      2, -0.960000038, -0.279999942,           0.
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*Element, type=R3D4
 1,  1,  2,  7, 40
 2, 40,  7,  8, 39
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*Element, type=R3D3
24, 71, 51, 57
25, 48, 75, 47
26, 90, 65, 66
86,  20, 133,  21
*Node
    142,           0., -6.12323426e-17,        0.375
*Nset, nset=Part-1-Rigid-Inner-1-RefPt_, internal
142,
*Elset, elset=Part-1-Rigid-Inner-1, generate
   1,  141,    1
*End Instance
**
*Node
      1,           0.,           0.,           0.
*Nset, nset=Set-23
 1,
*Nset, nset=Set-27, instance=Part-1-Rigid-Outer-1
 8,
*Nset, nset=Set-28, instance=Part-1-Rigid-Outer-1
 481,
*Nset, nset=Set-29
 1,
*Nset, nset=Set-30, instance=Part-1-Rigid-Inner-1, generate
  1,  44,   1
*Elset, elset=Set-30, instance=Part-1-Rigid-Inner-1, generate
  1,  21,   1
*Nset, nset=Set-31, instance=Part-1-Rigid-Inner-1
 142,
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*Elset, elset=Set-33, instance=Part-1-Rigid-Inner-1
   1,   2,   3,   4,   5,   6
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*Nset, nset=Set-34, instance=Part-1-Rigid-Inner-1, generate
   1,  141,    1
*Elset, elset=Set-34, instance=Part-1-Rigid-Inner-1
   1,   2,   3,   4,   5,   6
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*Nset, nset=Set-35, instance=Part-1-Rigid-Outer-1
   1,   5,   6,   8,   9,  15
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*Elset, elset=Set-35, instance=Part-1-Rigid-Outer-1, generate
 321,  400,    1
*Nset, nset=Set-36, instance=Part-1-Rigid-Outer-1
   7,   8,  17,  18,  19,  20
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*Elset, elset=Set-36, instance=Part-1-Rigid-Outer-1, generate
   9,  168,    1
*Elset, elset=_m_Surf-3_SPOS, internal, instance=Part-1-Rigid-Outer-1, generate
 1,  8,  1
*Surface, type=ELEMENT, name=m_Surf-3
_m_Surf-3_SPOS, SPOS
*Elset, elset=_m_Surf-7_SPOS, internal, instance=Part-1-Rigid-Inner-1
 22, 23
*Surface, type=ELEMENT, name=m_Surf-7
_m_Surf-7_SPOS, SPOS
*Elset, elset=_s_Surf-3_S6, internal, instance=Cut-1-1, generate
 1249,  3813,  1282
*Elset, elset=_s_Surf-3_S4, internal, instance=Cut-1-1
 1258, 1260, 1262, 1264, 1266, 1277
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*Elset, elset=_s_Surf-3_S5, internal, instance=Cut-1-1
 1273, 1281, 2555, 2563, 3837, 3845
*Surface, type=ELEMENT, name=s_Surf-3
_s_Surf-3_S6, S6
_s_Surf-3_S4, S4
_s_Surf-3_S5, S5
*Elset, elset=_s_Surf-5_S3, internal, instance=Cut-1-1
 1237, 1238, 1239, 1240, 1241, 1242
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*Surface, type=ELEMENT, name=s_Surf-5
_s_Surf-5_S3, S3
*Rigid Body, ref node=Part-1-Rigid-Outer-1.Part-1-Rigid-Outer-1-RefPt_, elset=Part-1-Rigid-Outer-1.Part-1-Rigid-Outer-1
*Rigid Body, ref node=Part-1-Rigid-Inner-1.Part-1-Rigid-Inner-1-RefPt_, elset=Part-1-Rigid-Inner-1.Part-1-Rigid-Inner-1
*Nset, nset=_T-Cylindrical, internal
Set-34,
Set-36,
*Transform, nset=_T-Cylindrical, type=C
          0.,           0.,           0.,           0.,           0.,           1.
*Nset, nset="_T-Datum csys-1", internal
Set-31,
*Transform, nset="_T-Datum csys-1"
          1.,           0.,           0.,           0.,           1.,           0.
** Constraint: Constraint-1
*Tie, name=Constraint-1, adjust=yes
s_Surf-3, m_Surf-3
** Constraint: Constraint-2
*Tie, name=Constraint-2, adjust=yes
s_Surf-5, m_Surf-7
*End Assembly
**
** MATERIALS
**
*Material, name=Maraging300Steel
*Elastic
 2.75e+07, 0.33
*Plastic
309700.,0.
**
** BOUNDARY CONDITIONS
**
** Name: BC-1 Type: Symmetry/Antisymmetry/Encastre
*Boundary
Set-34, ENCASTRE
** Name: BC-3 Type: Displacement/Rotation
*Boundary
Set-36, 1, 1
Set-36, 3, 3
** ----------------------------------------------------------------
**
** STEP: Step-1
**
*Step, name=Step-1, nlgeom=NO
*Static
1., 1., 1e-05, 1.
**
** LOADS
**
** Name: Load-1   Type: Moment
*Cload, follower
Set-31, 6, 1.
**
** OUTPUT REQUESTS
**
*Restart, write, frequency=0
**
** FIELD OUTPUT: F-Output-1
**
*Output, field, variable=PRESELECT
**
** HISTORY OUTPUT: H-Output-1
**
*Output, history, variable=PRESELECT
*End Step
